*Heading
** Job name: FGM-tube Model name: Model-2
** Generated by: Abaqus/CAE 2021
*Preprint, echo=NO, model=NO, history=NO, contact=NO
**
** PARTS
**
*Part, name=Part-1
*Node
      1,           0.,        -100.,         125.
      2,           0.,        -100.,           0.
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*Element, type=C3D8R
  1,   90,  553, 2257,  481,    1,   25,  417,   48
  2,  553,  554, 2258, 2257,   25,   26,  418,  417
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*Nset, nset=Set-1, generate
    1,  4560,     1
*Elset, elset=Set-1, generate
    1,  3600,     1
** Section: Section-1
*Solid Section, elset=Set-1, material=FGM-tube
,
*End Part
**
**
** ASSEMBLY
**
*Assembly, name=Assembly
**
*Instance, name=Part-1-1, part=Part-1
*End Instance
**
*Nset, nset=Set-1, instance=Part-1-1
    2,    3,    5,    6,   10,   11
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*Elset, elset=Set-1, instance=Part-1-1
    9,   18,   27,   36,   45,   54
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*Elset, elset=_Surf-1_S6, internal, instance=Part-1-1, generate
 1351,  2696,     5
*Elset, elset=_Surf-1_S2, internal, instance=Part-1-1
  901,  902,  903,  904,  905,  906
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*Elset, elset=_Surf-1_S5, internal, instance=Part-1-1
  37,  38,  39,  40,  41,  42
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*Elset, elset=_Surf-1_S4, internal, instance=Part-1-1, generate
 2705,  3150,     5
*Surface, type=ELEMENT, name=Surf-1
_Surf-1_S6, S6
_Surf-1_S2, S2
_Surf-1_S4, S4
_Surf-1_S5, S5
*End Assembly
**
** MATERIALS
**
*Material, name=FGM-tube
*Depvar
      1,
*Elastic, dependencies=1
 50000., 0.3, , 80.
100000., 0.3, , 85.
125000., 0.3, , 90.
100000., 0.3, , 95.
 50000., 0.3, ,100.
*User Defined Field
** ----------------------------------------------------------------
**
** STEP: Step-1
**
*Step, name=Step-1, nlgeom=NO
*Static
1., 1., 1e-05, 1.
**
** BOUNDARY CONDITIONS
**
** Name: BC-1 Type: Displacement/Rotation
*Boundary
Set-1, 1, 1
Set-1, 2, 2
Set-1, 3, 3
**
** LOADS
**
** Name: Load-1   Type: Pressure
*Dsload
Surf-1, P, 10.
**
** OUTPUT REQUESTS
**
*Restart, write, frequency=0
**
** FIELD OUTPUT: F-Output-1
**
*Output, field
*Node Output
CF, RF, U
*Element Output, directions=YES
FV, LE, PE, PEEQ, PEMAG, S, SDV
*Contact Output
CDISP, CSTRESS
**
** HISTORY OUTPUT: H-Output-1
**
*Output, history, variable=PRESELECT
*End Step
